******************************************************
*Heading
Beebe-inspired sorter study
**
**	UNITS:	SI
************************************************************************
**			PARAMETERS
************************************************************************
*Node, nset = nall_right
1,0,0
2,0,4.00000019e-05
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**
**
** Declare user element
*User Element,Nodes=4,Type=U1,Iproperties=2,Properties=24,Coordinates=2,Variables=20,Unsymm
1,2,4,5,11,12,13
**
*element, type=U1, elset=el_real_right
 1,  87,  15,  16, 105
 2,  19, 104, 102,  18
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**
** call to *elgen which meshes the plate geometry
** "Master Element" for *Elgen
*element, type=CPE4H, elset=el_dummy_right
10001,87,15,16,105
10002,19,104,102,18
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**
*Nset, nset=outer_right
  2,  3,  4,  5, 15, 16
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*Elset, elset=outer_right
   1,   2,   6,   8,   9,  10
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*Nset, nset=mid_right
 1,
*Nset, nset=top_right
 2,
*Surface, Type=Node, Name=OuterSurf_right
outer_right
*****************************
*System
      -0.0009,          0.,          0.,       0.996,          0.,          0.
*Node, nset=nall_left
341,0,0
342,0,4.00000019e-05
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**
*User Element,Nodes=4,Type=U2,Iproperties=2,Properties=24,Coordinates=2,Variables=20,Unsymm
1,2,4,5,11,12,13
**
*Element, type=U2,elset=el_real_left
316, 427, 355, 356, 445
317, 359, 444, 442, 358
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*element, type=CPE4H, elset=el_dummy_left
10316,427,355,356,445
10317,359,444,442,358
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*Nset, nset=outer_left
342,343,344,345,355,356
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*Elset, elset=outer_left
 316, 317, 321, 323, 324, 325
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*Nset, nset=mid_left
341,
*Nset, nset=top_left
342,
*Surface, Type=Node, Name=OuterSurf_left
outer_left
*System
**
** make rigid surfaces
**
*Nset,nset=nall
nall_right,nall_left
*Nset,nset=outer
outer_right,outer_left
*Elset,elset=el_dummy
el_dummy_right,el_dummy_left
*Node
9999,0.0,0.e-3
9998,0.0,1.e-6
9997,0.0,2.e-6
9996,0.0,3.e-6
9995,0.0,4.e-6
*Nset, Nset=RigidRef_rightTop
9999
*Nset, Nset=RigidRef_leftTop
9998
*Nset, Nset=RigidRef_bottom
9997
*Nset, Nset=RigidRef_channel1
9996
*Nset, Nset=RigidRef_channel2
9995
*Surface, type=SEGMENTS, name=RigidSurf_rightTop
START, 0.3e-3,   0.165e-3
LINE, -0.16e-3,   0.165e-3
*Rigid Body, ref node=RigidRef_rightTop, analytical surface=RigidSurf_rightTop
*Surface, type=SEGMENTS, name=RigidSurf_leftTop
START, -0.75e-3,   0.165e-3
LINE,  -1.2e-3,   0.165e-3
*Rigid Body, ref node=RigidRef_leftTop, analytical surface=RigidSurf_leftTop
*Surface, type=SEGMENTS, name=RigidSurf_bottom
START,-1.2e-3,   -0.165e-3
LINE,  0.3e-3,   -0.165e-3
*Rigid Body, ref node=RigidRef_bottom, analytical surface=RigidSurf_bottom
*Surface, type=SEGMENTS, name=RigidSurf_channel1
START,-0.16e-3,   0.165e-3
LINE,  -0.16e-3,  0.6e-3
*Rigid Body, ref node=RigidRef_channel1, analytical surface=RigidSurf_channel1
*Surface, type=SEGMENTS, name=RigidSurf_channel2
START,-0.75e-3,   0.165e-3
LINE, -0.75e-3,   0.6e-3
*Rigid Body, ref node=RigidRef_channel2, analytical surface=RigidSurf_channel2
**
************************************************************************
**			MATERIAL DEFINITION
************************************************************************
**
** Material properties for the real mesh
**
*uel property,elset=el_real_right
*******************************************************************
**Gshear      Kbulk	     chi	   D	mu0	     Vmol	     Rgas	theta
100000.0,	3000000.0,	0.4,	  1.7e-06,	0,	1.8e-05,	8.314,	298,
**
**phi0,             permitt,   DiffP, cRmaxP,      cbarP0,      zP_mob,   DiffN,  cRmaxN
0.999,	  8.85e-12,   4e-08,  10000.0,  1500.0,   1.0,     4e-08,  10000.0,
**
**     cbarN0,      zN_mob,           cRf,   zf 	       cOH0       zOH_mob    DiffOH, %(omgOH0)s
      5.0,   -1.0,     1495.0002, -1.0,     0.0002, 1.0, 5e-06 ,  48169.7773568
** 0.25,   -1,     1000,   1,      3,	3
**     nlSdv	ngSdv
		5,	     7
*******************************************************************
*uel property,elset=el_real_left
*******************************************************************
**Gshear      Kbulk	     chi	   D	mu0	     Vmol	     Rgas	theta
100000.0,	3000000.0,	0.4,	  1.7e-06,	0,	1.8e-05,	8.314,	298,
**
**phi0,             permitt,   DiffP, cRmaxP,      cbarP0,      zP_mob,   DiffN,  cRmaxN
0.999,	  8.85e-12,   4e-08,  10000.0,  5.0,   1.0,     4e-08,  10000.0,
**
**     cbarN0,      zN_mob,           cRf,   zf 	       cOH0       zOH_mob    DiffOH, omgOH0 = ???
      1500.0,   -1.0,     1495.00005, 1.0,     5e-05, -1.0, 5e-06 ,  51604.4214497
** 0.25,   -1,     1000,   1,      3,	3
**     nlSdv	ngSdv
		5,	     7
********************************************************
** Dummy mesh material properties
**
*Solid section, elset=el_dummy_right, material=umaterial
*Solid section, elset=el_dummy_left, material=umaterial
***Hourglass Stiffness
**80.e-20
**
*Material, name=umaterial
**
*Elastic
1e-20, 0.3
*User output variables
7
**
** *user material, constant=0
** **
** *Depvar
** 19
** 1, cbar
** 2, T11
** 3, T22
** 4, T12
** 5, T33
** 6, Tes11
** 7, Tes22
** 8, Tes12
** 9, Tes33
** 10, Tme11
** 11, Tme22
** 12, Tme12
** 13, Tme33
** 14, e1
** 15, e2
** 16, j1
** 17, j2
** 18, pbar
** 19, Js
**
**
*Density
1.0
**
*Specific heat
1.0
**
**
************************************************************************
**			BOUNDARY CONDITIONS
************************************************************************
** *EQUATION
** 2
** right,2,-1.0
** ref_node,2,1.0
** 2
** right,1,-1.0
** ref_node,1,1.0
**
**
*Contact Pair, Interaction=int, Type=node to surface
OuterSurf_right,RigidSurf_rightTop
OuterSurf_left,RigidSurf_leftTop
OuterSurf_right,RigidSurf_bottom
OuterSurf_left,RigidSurf_bottom
**
*Surface Interaction, name=int
*Friction
0.0
*Surface Behavior, pressure-overclosure=hard
**
************************************************************************
**			INITIAL CONDITIONS
************************************************************************
**
*Initial conditions, type=temperature
nall_right, -80700.6269551, 8163.19432417, -5968.33742913
nall_left, -80700.6269551, -5968.33742913, 8163.19432417
**, %(omg1_init)s, %(omg2_init)s
************************************************************************
**			AMPLITUDE DEFINITION
************************************************************************
**
*Amplitude, name=amp_1_A
0.,-80700.6269551, 14400.0, -87.8165133422
*Amplitude, name=amp_1b_A
0.,8163.19432417, 14400.0, -10902.2478055
*Amplitude, name=amp_1c_A
0.,-5968.33742913, 14400.0, -25033.7795588
*Amplitude, name=amp_1_B
0.,-80700.6269551, 14400.0, -87.8165133422
*Amplitude, name=amp_1b_B
0.,-5968.33742913, 14400.0, -25033.7795588
*Amplitude, name=amp_1c_B
0.,8163.19432417, 14400.0, -10902.2478055
*******
*Amplitude, name=amp_cycle_A
**, definition= Smooth Step
0.,-87.8165133422,14400.0,-4.45963851926,18000.0,-4.45963851926
*Amplitude, name=amp_cycle1_A
**, definition= Smooth Step
0.,-10902.2478055,14400.0,-17375.4993256,18000.0,-17375.4993256
*Amplitude, name=amp_cycle2_A
**, definition= Smooth Step
0.,-25033.7795588,14400.0,-17375.4993256,18000.0,-17375.4993256
**
*Amplitude, name=amp_cycle_B
**, definition= Smooth Step
0.,-87.8165133422,14400.0,-4.45963851926,18000.0,-4.45963851926
*Amplitude, name=amp_cycle1_B
**, definition= Smooth Step
0.,-25033.7795588,14400.0,-17375.4993256,18000.0,-17375.4993256
*Amplitude, name=amp_cycle2_B
**, definition= Smooth Step
0.,-10902.2478055,14400.0,-17375.4993256,18000.0,-17375.4993256
****
*Amplitude, name=amp_pH1, definition= Smooth Step
0.,0.0,4.0,-18831.7831085,30.0,-18831.7831085,34.0,15397.1390156
60.0,15397.1390156
*Amplitude, name=amp_pH2, definition= Smooth Step
0.,0.0,4.0,15397.1390156,30.0,15397.1390156,34.0,0.0
60.0,0.0
*Amplitude, name=amp_pH1_, definition= Smooth Step
0.,0.0,4.0,18831.7831085,30.0,18831.7831085,34.0,-15397.1390156
60.0,-15397.1390156
*Amplitude, name=amp_pH2_, definition= Smooth Step
0.,0.0,4.0,-15397.1390156,30.0,-15397.1390156,34.0,0.0
60.0,0.0
************************************************************************
**			STEP DEFINITION
************************************************************************
************************************************************************
*Step, Name=swell, nlgeom=yes, inc=50000
*Coupled temperature-displacement, deltmx=2000
**, stabilize
0.0018,18000.0,1e-15,720.0
*CONTROLS, PARAMETERS=TIME INCREMENTATION
,,,,,,,30,,,,,,
***Solution technique, type=separated
*CONTROLS, PARAMETERS=LINE SEARCH
10,1.0,0.0001,0.25,0.10
**
** 	DISPLACEMENT B.C.
*Boundary,op=mod
mid_right,1,2
top_right,1,1
mid_left,1,2
top_left,1,1
RigidRef_rightTop,encastre
RigidRef_leftTop,encastre
RigidRef_bottom,encastre
RigidRef_channel1,encastre
RigidRef_channel2,encastre
**
nall,5,5,0.
**nall,4,4,0.
*Boundary,amplitude=amp_1_A
nall_right,11,11,1.
*Boundary,amplitude=amp_1b_A
nall_right,12,12,1.
*Boundary,amplitude=amp_1c_A
nall_right,13,13,1.
**
*Boundary,amplitude=amp_1_B
nall_left,11,11,1.
*Boundary,amplitude=amp_1b_B
nall_left,12,12,1.
*Boundary,amplitude=amp_1c_B
nall_left,13,13,1.
**
**	OUTPUTS
**
*Output, field
**, number interval=40
*node output, nset=nall
u,nt
*Element output, elset=el_dummy
le,UVARM
**
*Output, history
*Element output, elset=el_dummy
UVARM1
***Node output, nset=ref_node
**rf2
*End Step
************************************************************************
*Step, Name=equilibriate1, nlgeom=yes, inc=50000
*Coupled temperature-displacement, deltmx=2000, stabilize
0.0018,18000.0,1e-15,720.0
*CONTROLS, PARAMETERS=TIME INCREMENTATION
,,,,,,,30,,,,,,
***Solution technique, type=separated
*CONTROLS, PARAMETERS=LINE SEARCH
10,1.0,0.0001,0.25,0.10
**
** 	DISPLACEMENT B.C.
*Boundary,op=new
mid_right,1,2
top_right,1,1
mid_left,1,2
top_left,1,1
RigidRef_rightTop,encastre
RigidRef_leftTop,encastre
RigidRef_bottom,encastre
RigidRef_channel1,encastre
RigidRef_channel2,encastre
**right,1,1,3.e-3
**top,2,2,10.e-3
**
**nall,5,5,0.
outer_right,5,5,0.
outer_left,5,5,0.
**nall,4,4,0.
**nall,12,12,omg1_init = ???
**nall,13,13,%(omg2_init)s
**nall,11,11,%(omg_init)s
**
*Boundary,amplitude=amp_cycle_A,op=new
nall_right,11,11,1.
*Boundary,amplitude=amp_cycle1_A,op=new
nall_right,12,12,1.
*Boundary,amplitude=amp_cycle2_A,op=new
nall_right,13,13,1.
**
*Boundary,amplitude=amp_cycle_B,op=new
nall_left,11,11,1.
*Boundary,amplitude=amp_cycle1_B,op=new
nall_left,12,12,1.
*Boundary,amplitude=amp_cycle2_B,op=new
nall_left,13,13,1.
**	OUTPUTS
**
*Output, field
**, number interval=40
*node output, nset=nall
u,nt
*Element output, elset=el_dummy
le,UVARM
**
*Output, history
***Node output, nset=ref_node
**rf2
*End Step
************************************************************************
************************************************************************
*Step, Name=decrease, nlgeom=yes, inc=50000
*Coupled temperature-displacement, deltmx=2000
**, stabilize
0.0018,60.0,1e-15,0.15
*CONTROLS, PARAMETERS=TIME INCREMENTATION
,,,,,,,30,,,,,,
***Solution technique, type=separated
*CONTROLS, PARAMETERS=LINE SEARCH
10,1.0,0.0001,0.25,0.10
**
** 	DISPLACEMENT B.C.
*Boundary,op=new
mid_right,1,2
top_right,1,1
mid_left,1,2
top_left,1,1
RigidRef_rightTop,encastre
RigidRef_leftTop,encastre
RigidRef_bottom,encastre
RigidRef_channel1,encastre
RigidRef_channel2,encastre
**right,1,1,3.e-3
**top,2,2,10.e-3
**
**nall,5,5,0.
**outer,5,5,0.
**
outer,11,11,-4.45963851926
outer,12,12,-17375.4993256
outer,13,13,-17375.4993256
**
*Boundary,amplitude=amp_pH1,op=new
outer_right,5,5,1.
*Boundary,amplitude=amp_pH1_,op=new
outer_left,5,5,1.
**right,11,11,1.
**
**	OUTPUTS
**
*Output, field
**, number interval=40
*node output, nset=nall
u,nt
*Element output, elset=el_dummy
le,UVARM
**
*Output, history
***Node output, nset=ref_node
**rf2
*End Step
************************************************************************
