******************************************************
*Heading
Voltage-induced bending study
**
**	UNITS:	SI
************************************************************************
**			PARAMETERS
************************************************************************
*Parameter
**
** total simulation time (seconds)
tramp = 3600*2.
tload = 3600*3.
tlim = tramp/20.
tlim2 = tlim/2
**
deltload = 0.1
**0.05*3600.
tday = 24*3600.
tload1 = deltload
tload2 = 30.
**tday/100
tload3 = tload2 + deltload
tload4 = 2*tload2
tload5 = 2*tday + 2*deltload
tload6 = 3*tday
**
** Total strain
eps = 0.2
**
** Strain rate
epsdot = eps/tload
**
** Velocity
vel2 = epsdot*1e-3
**
** inital time step
ti = tload/1e7
**
** max time step
tmax = tload/500
**
** min time step
tmin = 1e-15
**
*******************************
Eyoung = 2.9*75.e3
anu = 0.45
Gshear = 100.e3
**72.5e3/2.
**75.e3
Kbulk = Gshear*30
**72.5e4
**750.e3
*******************************
mu0 = 0
**
c1_st = 10000.
c2_st = 10000.
**
c1_init0 = 1500.
c2_init0 = 5.
c3_init0 = 1.e-4*1.e3
**4.8
**1480.
**
phi_init0 = 0.999
**
cbar10 = c1_init0/c1_st
cbar20 = c2_init0/c2_st
**cbar_bound = 0.15
c_bound = c1_init0 - c2_init0  + c3_init0
**+ c3_init0
**1600.
**
Rgas = 8.314
vartheta = 298
**omg_init = mu0 + Rgas*vartheta*log(cbar0)
**
*********************
z_val = 0.
z1_val = 1.
z2_val = -1.
z3_val = 1.
z_bound = -1.
Farad = 96485.
********************
**
Omega = 1.8e-5
**21.e-5
D  = 1.7e-6
**2.e-5
D1 = 4.e-8
**1.e-8
**1.e-6
D2 = 4.e-8
**1.e-8
**1.e-6
D3 = 7.e-7
**
**
chi = 0.4
omg_init0  = mu0 + Rgas*vartheta*(log(1-phi_init0)+ phi_init0*(1+chi*phi_init0)-Omega*(c1_init0+c2_init0)*(phi_init0)/(1-phi_init0))
**mu0 + Rgas*vartheta*(log(1-phi_init0)+ phi_init0*(1+chi*phi_init0)-Omega*(c1_init0+c2_init0)*(phi_init0)/(1-phi_init0))
**mu0 + Rgas*vartheta*(log(1-phi_init0)+ phi_init0*(1+chi*phi_init0))
**
omg1_init0 = mu0 + Rgas*vartheta*log(Omega*c1_init0*(phi_init0)/(1-phi_init0))
**mu0 + Rgas*vartheta*log(Omega*c1_init0)
**mu0 + Rgas*vartheta*log(Omega*c1_init0*(phi_init0)/(1-phi_init0))
omg2_init0 = mu0 + Rgas*vartheta*log(Omega*c2_init0*(phi_init0)/(1-phi_init0))
**mu0 + Rgas*vartheta*log(Omega*c2_init0)
**mu0 + Rgas*vartheta*log(Omega*c2_init*(phi_init0)/(1-phi_init0))
**
omg3_init0 = 0.
omg30 = -Rgas*vartheta*log(Omega*c3_init0)
**
phi_init = 1/3.2
**1/3.215
c1_init = c1_init0
** 505.
** *phi_init0/phi_init
c2_init = c2_init0
** 1980.
** *phi_init0/phi_init
**
omg_init  = mu0 + Rgas*vartheta*(log(1-phi_init)+ phi_init*(1+chi*phi_init)-Omega*(c1_init+c2_init)*(phi_init)/(1-phi_init))
** mu0 + Rgas*vartheta*(log(1-phi_init)+ phi_init*(1+chi*phi_init)-Omega*(c1_init+c2_init)*(phi_init)/(1-phi_init))
** mu0 + Rgas*vartheta*(log(1-phi_init)+ phi_init*(1+chi*phi_init))
**
omg1_init = mu0 + Rgas*vartheta*log(Omega*c1_init*(phi_init)/(1-phi_init))
**mu0 + Rgas*vartheta*log(Omega*c1_init)
**mu0 + Rgas*vartheta*log(Omega*c1_init*(phi_init)/(1-phi_init))
omg2_init = mu0 + Rgas*vartheta*log(Omega*c2_init*(phi_init)/(1-phi_init))
**mu0 + Rgas*vartheta*log(Omega*c2_init)
**mu0 + Rgas*vartheta*log(Omega*c2_init*(phi_init)/(1-phi_init))
**
c1_sol1 = 50.
c3_sol1 = c3_init0
c2_sol1 = 50.
**
**omg_sol1 = omg_init
**omg1_sol1 = omg1_init
**omg2_sol1 = omg2_init
**
**omg_init=omg_init0
**omg1_init=omg1_init0
**omg2_init=omg2_init0
**
omg_sol1 = mu0 - Rgas*vartheta*Omega*(c1_sol1+c2_sol1+c3_sol1)
**omg_sol1 = 0.9*omg_init
omg1_sol1 = mu0 +  Rgas*vartheta*log(Omega*c1_sol1)
omg2_sol1 = mu0 +  Rgas*vartheta*log(Omega*c2_sol1)
********************
omg3_sol1 = omg30 + Rgas*vartheta*log(Omega*c3_sol1)
**
c3_sol2 = 1.e-7*1.e3
omg3_sol2 = omg30 + Rgas*vartheta*log(Omega*c3_sol2)
**
c3_sol3 = 1.e-7*1.e3
omg3_sol3 = omg30 + Rgas*vartheta*log(Omega*c3_sol3)
********************
c1_sol2 = 200.
c2_sol2 = 200.
**
omg_sol2  = mu0 - Rgas*vartheta*Omega*(c1_sol2+c2_sol2)
omg1_sol2 = mu0 +  Rgas*vartheta*log(Omega*c1_sol2)
omg2_sol2 = mu0 +  Rgas*vartheta*log(Omega*c2_sol2)
***************
omg_diff1 = omg_sol1-omg_sol2
omg1_diff1 = omg1_sol1-omg1_sol2
omg2_diff1 = omg2_sol1-omg2_sol2
omg3_diff1 = omg3_sol1-omg3_sol2
omg3_sol1b = omg3_sol1*1
omg3_sol1c = omg3_sol1 - omg3_sol1b
**
omg_diff2 = omg_sol2-omg_sol1
omg1_diff2 = omg1_sol2-omg1_sol1
omg2_diff2 = omg2_sol2-omg2_sol1
**
** Integer parameters
nlSdv = 3
ngSdv = 3
nInt = 4
nvars = nlSdv*nInt
**
** ~~~~~~~~~~~~~~~~~~~~~~~~~~~~~~~~~~~~~~~~~~~~~~~~~~~~~~~~~~~~~~~~~~~~~
** 			INPUTS
** ~~~~~~~~~~~~~~~~~~~~~~~~~~~~~~~~~~~~~~~~~~~~~~~~~~~~~~~~~~~~~~~~~~~~~
**
** major dimensions of plate (m)
xlength = 1.69e-3
**
ylength = 6.77e-3/2
**
** number of elements along each direction
xElem = 10
yElem = 10
**
**
** ~~~~~~~~~~~~~~~~~~~~~~~~~~~~~~~~~~~~~~~~~~~~~~~~~~~~~~~~~~~~~~~~~~~~~
** 			GEOMETRY GENERATION
** ~~~~~~~~~~~~~~~~~~~~~~~~~~~~~~~~~~~~~~~~~~~~~~~~~~~~~~~~~~~~~~~~~~~~~
**
**
** Number of nodes in each direction
xNode = xElem + 1
yNode = yElem + 1
**
tlElem = xElem*(yElem-1)+1
trElem = xElem*yElem
** Note the definition of the vertices:
** !
** !   4-----------3          | y
** !   |           |          |
** !   |           |          |
** !   |           |          |
** !   |           |          |
** !   |           |          O--------- x
** !   1-----------2        origin at (1)
**
** Make node numbers for the vertices
n1 = 1
n2 = xElem + n1
n4 = xNode*yElem + n1
n3 = n4 + xElem
**
** Node indices for master element
n1m = 1
n2m = 2
n3m = xNode + 2
n4m = xNode + 1
**
** Nodes at the vertices:
*Node, nset = nall
1,0,0
2,0,4.00000019e-05
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**
**
** Declare user element
*User Element,Nodes=4,Type=U2,Iproperties=2,Properties=24,Coordinates=2,Variables=20,Unsymm
1,2,4,5,11,12,13
**
*element, type=U2, elset=el_real
1,  87,  15,  16, 105
 2,  19, 104, 102,  18
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**
** call to *elgen which meshes the plate geometry
** "Master Element" for *Elgen
*element, type=CPE4H, elset=el_dummy
10001,87,15,16,105
10002,19,104,102,18
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**
*Nset, nset=outer
  2,  3,  4,  5, 15, 16
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*Elset, elset=outer
   1,   2,   6,   8,   9,  10
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*Nset, nset=mid
 1,
*Nset, nset=top
 2,
*Surface, Type=Node, Name=OuterSurf
outer
*Node, nset=ref_node
50005,0.5e-3,3.5e-3
**
** make a rigid surface
**
*Node
9999,0.0,0.e-3
*Nset, Nset=RigidRef
9999
*Surface, type=SEGMENTS, name=RigidSurf
START, 3.e-3,   0.17e-3
LINE, -3.e-3,   0.17e-3
*Rigid Body, ref node=RigidRef, analytical surface=RigidSurf
*Nset, Nset=RigidRef2
9998
*Surface, type=SEGMENTS, name=RigidSurf2
START,-3.e-3,   -0.17e-3
LINE,  3.e-3,   -0.17e-3
*Rigid Body, ref node=RigidRef2, analytical surface=RigidSurf2
**
************************************************************************
**			MATERIAL DEFINITION
************************************************************************
**
** Material properties for the real mesh
**
*uel property,elset=el_real
*******************************************************************
**Gshear      Kbulk	     chi	   D	mu0	     Vmol	     Rgas	theta
<Gshear>,	<Kbulk>,	<chi>,	  <D>,	<mu0>,	<Omega>,	<Rgas>,	<vartheta>,
**
**phi0,             permitt,   DiffP, cRmaxP,      cbarP0,      zP_mob,   DiffN,  cRmaxN
<phi_init0>,	  8.85e-12,   <D1>,  <c1_st>,  <c1_init0>,   <z1_val>,     <D2>,  <c2_st>,
**
**     cbarN0,      zN_mob,           cRf,   zf 	       cOH0       zOH_mob    DiffOH, <omgOH0>
      <c2_init0>,   <z2_val>,     <c_bound>, <z_bound>,     <c3_init0>, <z3_val>, <D3> ,  <omg30>
** 0.25,   -1,     1000,   1,      3,	3
**     nlSdv	ngSdv
		5,	     7
*******************************************************************
** Dummy mesh material properties
**
*Solid section, elset=el_dummy, material=umaterial
***Hourglass Stiffness
**80.e-20
**
*Material, name=umaterial
**
*Elastic
1e-20, 0.3
*User output variables
7
**
** *user material, constant=0
** **
** *Depvar
** 19
** 1, cbar
** 2, T11
** 3, T22
** 4, T12
** 5, T33
** 6, Tes11
** 7, Tes22
** 8, Tes12
** 9, Tes33
** 10, Tme11
** 11, Tme22
** 12, Tme12
** 13, Tme33
** 14, e1
** 15, e2
** 16, j1
** 17, j2
** 18, pbar
** 19, Js
**
**
*Density
1.0
**
*Specific heat
1.0
**
**
************************************************************************
**			BOUNDARY CONDITIONS
************************************************************************
** *EQUATION
** 2
** right,2,-1.0
** ref_node,2,1.0
** 2
** right,1,-1.0
** ref_node,1,1.0
**
**
*Contact Pair, Interaction=int, Type=node to surface
OuterSurf,RigidSurf
OuterSurf,RigidSurf2
**
*Surface Interaction, name=int
*Friction
0.0
*Surface Behavior, pressure-overclosure=hard
**
************************************************************************
**			INITIAL CONDITIONS
************************************************************************
**
*Initial conditions, type=temperature
nall, <omg_init0>, <omg1_init0>, <omg2_init0>
**, <omg1_init>, <omg2_init>
************************************************************************
**			AMPLITUDE DEFINITION
************************************************************************
**
*Amplitude, name=amp_1
0.,<omg_init0>, <tramp>, <omg_init>
*Amplitude, name=amp_1b
0.,<omg1_init0>, <tramp>, <omg1_init>
*Amplitude, name=amp_1c
0.,<omg2_init0>, <tramp>, <omg2_init>
*Amplitude, name=amp_cycle, definition= Smooth Step
0.,<omg_init>,<tramp>,<omg_sol1>,<tload>,<omg_sol1>
**0.,<omg_init>,<tload1>,<omg_sol1>,<tload2>,<omg_sol1>,<tload3>,<omg_sol2>
**<tload4>,<omg_sol2>
*Amplitude, name=amp_cycle1, definition= Smooth Step
0.,<omg1_init>,<tramp>,<omg1_sol1>,<tload>,<omg1_sol1>
*Amplitude, name=amp_cycle2, definition= Smooth Step
0.,<omg2_init>,<tramp>,<omg2_sol1>,<tload>,<omg2_sol1>
*Amplitude, name=amp_pH1
**, definition= Smooth Step
**,definition=decay
**<omg3_sol1b>,<omg3_sol1c>,0.,50.
**<omg3_sol2>,<omg3_diff1>,0.,0.5
**, definition= Smooth Step
0.,<omg3_sol1>,<tload1>,<omg3_sol2>,<tload2>,<omg3_sol2>,<tload3>,<omg3_sol1>
**<tload4>,<omg3_sol1>
*Amplitude, name=amp_pH2
**, definition= Smooth Step
0.,<omg3_sol2>,<tload1>,<omg3_sol1>,<tload2>,<omg3_sol1>
*Amplitude, name=amp_cycle_b
0,-4.4596296,1.51260504,-4.57205724,3.02521008,-4.68448487,4.53781513,-4.79691251
6.05042017,-4.90934015,7.56302521,-5.02176778,9.07563025,-5.13419542,10.5882353,-5.24662306
12.1008403,-5.3590507,13.6134454,-5.47147833,15.1260504,-5.58390597,16.6386555,-5.69633361
18.1512605,-5.80876124,19.6638655,-5.92118888,21.1764706,-6.03361652,22.6890756,-6.14604415
24.2016807,-6.25847179,25.7142857,-6.37089943,27.2268908,-6.48332707,28.7394958,-6.5957547
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175.462185,-17.5012355,176.97479,-17.6136631,178.487395,-17.7260908,180,-17.8385184
*Amplitude, name=amp_cycle1b
0,-17375.4993,1.51260504,-17313.8138,3.02521008,-17253.627,4.53781513,-17194.8676
6.05042017,-17137.4695,7.56302521,-17081.3711,9.07563025,-17026.5149,10.5882353,-16972.847
12.1008403,-16920.317,13.6134454,-16868.8777,15.1260504,-16818.4846,16.6386555,-16769.0962
18.1512605,-16720.673,19.6638655,-16673.1782,21.1764706,-16626.5767,22.6890756,-16580.8356
24.2016807,-16535.9237,25.7142857,-16491.8115,27.2268908,-16448.4709,28.7394958,-16405.8755
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175.462185,-13988.1486,176.97479,-13972.2836,178.487395,-13956.5196,180,-13940.8552
*Amplitude, name=amp_cycle2b
0,-17375.4993,1.51260504,-17313.8138,3.02521008,-17253.627,4.53781513,-17194.8676
6.05042017,-17137.4695,7.56302521,-17081.3711,9.07563025,-17026.5149,10.5882353,-16972.847
12.1008403,-16920.317,13.6134454,-16868.8777,15.1260504,-16818.4846,16.6386555,-16769.0962
18.1512605,-16720.673,19.6638655,-16673.1782,21.1764706,-16626.5767,22.6890756,-16580.8356
24.2016807,-16535.9237,25.7142857,-16491.8115,27.2268908,-16448.4709,28.7394958,-16405.8755
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175.462185,-13988.1486,176.97479,-13972.2836,178.487395,-13956.5196,180,-13940.8552
**
*Amplitude, name=amp_cycle_c
0,-17.8385184,1.51260504,-17.7260908,3.02521008,-17.6136631,4.53781513,-17.5012355
6.05042017,-17.3888079,7.56302521,-17.2763802,9.07563025,-17.1639526,10.5882353,-17.0515249
12.1008403,-16.9390973,13.6134454,-16.8266697,15.1260504,-16.714242,16.6386555,-16.6018144
18.1512605,-16.4893868,19.6638655,-16.3769591,21.1764706,-16.2645315,22.6890756,-16.1521038
24.2016807,-16.0396762,25.7142857,-15.9272486,27.2268908,-15.8148209,28.7394958,-15.7023933
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175.462185,-4.79691251,176.97479,-4.68448487,178.487395,-4.57205724,180,-4.4596296
*Amplitude, name=amp_cycle1c
0,-13940.8552,1.51260504,-13956.5196,3.02521008,-13972.2836,4.53781513,-13988.1486
6.05042017,-14004.1158,7.56302521,-14020.1866,9.07563025,-14036.3623,10.5882353,-14052.6444
12.1008403,-14069.0341,13.6134454,-14085.533,15.1260504,-14102.1425,16.6386555,-14118.864
18.1512605,-14135.6992,19.6638655,-14152.6496,21.1764706,-14169.7168,22.6890756,-14186.9023
24.2016807,-14204.2079,25.7142857,-14221.6352,27.2268908,-14239.186,28.7394958,-14256.8619
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175.462185,-17194.8676,176.97479,-17253.627,178.487395,-17313.8138,180,-17375.4993
*Amplitude, name=amp_cycle2c
0,-13940.8552,1.51260504,-13956.5196,3.02521008,-13972.2836,4.53781513,-13988.1486
6.05042017,-14004.1158,7.56302521,-14020.1866,9.07563025,-14036.3623,10.5882353,-14052.6444
12.1008403,-14069.0341,13.6134454,-14085.533,15.1260504,-14102.1425,16.6386555,-14118.864
18.1512605,-14135.6992,19.6638655,-14152.6496,21.1764706,-14169.7168,22.6890756,-14186.9023
24.2016807,-14204.2079,25.7142857,-14221.6352,27.2268908,-14239.186,28.7394958,-14256.8619
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175.462185,-17194.8676,176.97479,-17253.627,178.487395,-17313.8138,180,-17375.4993
************************************************************************
**			STEP DEFINITION
************************************************************************
************************************************************************
*Step, Name=swell, nlgeom=yes, inc=50000
*Coupled temperature-displacement, deltmx=2000
**, stabilize
<ti>,<tload>,<tmin>,<tlim>
*CONTROLS, PARAMETERS=TIME INCREMENTATION
,,,,,,,30,,,,,,
***Solution technique, type=separated
*CONTROLS, PARAMETERS=LINE SEARCH
10,1.0,0.0001,0.25,0.10
**
** 	DISPLACEMENT B.C.
*Boundary,op=mod
mid,1,2
top,1,1
RigidRef,encastre
RigidRef2,encastre
**
nall,5,5,0.
**nall,4,4,0.
*Boundary,amplitude=amp_1
nall,11,11,1.
*Boundary,amplitude=amp_1b
nall,12,12,1.
*Boundary,amplitude=amp_1c
nall,13,13,1.
**
**	OUTPUTS
**
*Output, field
**, number interval=40
*node output, nset=nall
u,nt
*Element output, elset=el_dummy
le,UVARM
**
*Output, history
*Element output, elset=el_dummy
UVARM1
***Node output, nset=ref_node
**rf2
*End Step
************************************************************************
*Step, Name=equilibriate1, nlgeom=yes, inc=50000
*Coupled temperature-displacement, deltmx=2000
**, stabilize
<ti>,<tload>,<tmin>,<tlim>
*CONTROLS, PARAMETERS=TIME INCREMENTATION
,,,,,,,30,,,,,,
***Solution technique, type=separated
*CONTROLS, PARAMETERS=LINE SEARCH
10,1.0,0.0001,0.25,0.10
**
** 	DISPLACEMENT B.C.
*Boundary,op=new
mid,1,2
top,1,1
RigidRef,encastre
RigidRef2,encastre
**right,1,1,3.e-3
**top,2,2,10.e-3
**
**nall,5,5,0.
outer,5,5,0.
**nall,4,4,0.
**nall,12,12,<omg1_init>
**nall,13,13,<omg2_init>
**nall,11,11,<omg_init>
**
*Boundary,amplitude=amp_cycle,op=new
outer,11,11,1.
*Boundary,amplitude=amp_cycle1,op=new
outer,12,12,1.
*Boundary,amplitude=amp_cycle2,op=new
outer,13,13,1.
**right,11,11,1.
**
**	OUTPUTS
**
*Output, field
**, number interval=40
*node output, nset=nall
u,nt
*Element output, elset=el_dummy
le,UVARM
**
*Output, history
*Element output, elset=el_dummy
UVARM1
***Node output, nset=ref_node
**rf2
*End Step
************************************************************************
************************************************************************
*Step, Name=increase, nlgeom=yes, inc=50000
*Coupled temperature-displacement, deltmx=2000
**, stabilize
<ti>,<tload2>,<tmin>,0.3
*CONTROLS, PARAMETERS=TIME INCREMENTATION
,,,,,,,30,,,,,,
***Solution technique, type=separated
***CONTROLS, PARAMETERS=LINE SEARCH
**10,1.0,0.0001,0.25,0.10
**
** 	DISPLACEMENT B.C.
*Boundary,op=new
mid,1,2
top,1,1
RigidRef,encastre
RigidRef2,encastre
**right,1,1,3.e-3
**top,2,2,10.e-3
**
**nall,5,5,0.
**outer,5,5,0.
**
outer,11,11,<omg_sol1>
outer,12,12,<omg1_sol1>
outer,13,13,<omg2_sol1>
**
*Boundary,amplitude=amp_pH1,op=new
outer,5,5,1.
**right,11,11,1.
**
**	OUTPUTS
**
*Output, field
**, number interval=40
*node output, nset=nall
u,nt
*Element output, elset=el_dummy
le,UVARM
**
*Output, history
*Element output, elset=el_dummy
UVARM1
*Node output, nset=top
u2
*End Step
************************************************************************
************************************************************************
*Step, Name=decrease, nlgeom=yes, inc=50000
*Coupled temperature-displacement, deltmx=2000, stabilize
<ti>,<tload2>,<tmin>,0.3
*CONTROLS, PARAMETERS=TIME INCREMENTATION
,,,,,,,30,,,,,,
***Solution technique, type=separated
*CONTROLS, PARAMETERS=LINE SEARCH
10,1.0,0.0001,0.25,0.10
**
** 	DISPLACEMENT B.C.
*Boundary,op=new
mid,1,2
top,1,1
RigidRef,encastre
RigidRef2,encastre
**right,1,1,3.e-3
**top,2,2,10.e-3
**
**nall,5,5,0.
**outer,5,5,0.
**
outer,11,11,<omg_sol1>
outer,12,12,<omg1_sol1>
outer,13,13,<omg2_sol1>
**
*Boundary,amplitude=amp_pH2,op=new
outer,5,5,1.
**right,11,11,1.
**
**	OUTPUTS
**
*Output, field
**, number interval=40
*node output, nset=nall
u,nt
*Element output, elset=el_dummy
le,UVARM
**
*Output, history
*Element output, elset=el_dummy
UVARM1
*Node output, nset=top
u2
*End Step
************************************************************************
