******************************************************
*Heading
Bi-material beam study
**
**	UNITS:	SI
************************************************************************
**			PARAMETERS
************************************************************************
*Parameter
**
** total simulation time (seconds)
tramp = 3600*2.
tload = 3600*5.
tlim = tramp/40.
tlim2 = tlim/2
**
deltload = 400.
deltload2 = 7.5
tload0b = deltload2
tload1b = deltload2*2
tload2b = 60.
tday = 24*3600.
tload1 = deltload
tload2 = 3000.
tload3 = tload2 + deltload
tload4 = 2*tload2
tload5 = 2*tday + 2*deltload
tload6 = 3*tday
tlim2 = tload2/30
**
** Total strain
eps = 0.2
**
** Strain rate
epsdot = eps/tload
**
** Velocity
vel2 = epsdot*1e-3
**
** inital time step
ti = tload/1e7
**
** max time step
tmax = tload/500
**
** min time step
tmin = 1e-15
**
*******************************
Eyoung = 2.9*75.e3
anu = 0.45
Gshear = 100.e3
**72.5e3/2.
**75.e3
Kbulk = Gshear*10
**72.5e4
**750.e3
*******************************
mu0 = 0
**
c1_st = 10000.
c2_st = 10000.
**
c1_init0_A = 1500.
**1500.
c2_init0_A = 5.
c1_init0_B = 5.
c2_init0_B = 1500.
c1_init0_C = 5.
c2_init0_C = 5.
c3_init0 = 0.5625*1.e-5*1.e3
c4_init0 = 0.1778*1.e-7*1.e3
**1480.
**
Ka_COOH = 0.3162*1.e-4*1.e3
Ka_none = 1.e-15*1.e3
Kb_NH3  = 1.e-6*1.e3
phi_init0 = 0.999
**
**cbar_bound = 0.15
c_bound_A = c1_init0_A - c2_init0_A + c3_init0
c_bound_B = c2_init0_B - c1_init0_B + c4_init0
c_bound_C = 0.
**+ c3_init0
**1600.
**
Rgas = 8.314
vartheta = 298
**omg_init = mu0 + Rgas*vartheta*log(cbar0)
**
*********************
z_val = 0.
z1_val = 1.
z2_val = -1.
z3_val = 1.
z4_val = -1.
z_bound_A = -1.
z_bound_B = 1.
z_bound_C = -1.
Farad = 96485.
********************
**
Omega = 1.8e-5
**21.e-5
D  = 1.7e-6
**2.e-5
D1 = 4.e-8
**1.e-8
**1.e-6
D2 = 4.e-8
**1.e-8
**1.e-6
D3 = 7.e-7
D4 = 7.e-7
**
key0 = 0.
key1 = 1.
**
chi = 0.4
omg_init0_A  = mu0 + Rgas*vartheta*(log(1-phi_init0)+ phi_init0*(1+chi*phi_init0)-Omega*(c1_init0_A+c2_init0_A+c3_init0)*(phi_init0)/(1-phi_init0))
**
omg1_init0_A = mu0 + Rgas*vartheta*log(Omega*c1_init0_A*(phi_init0)/(1-phi_init0))
omg2_init0_A = mu0 + Rgas*vartheta*log(Omega*c2_init0_A*(phi_init0)/(1-phi_init0))
**
omg_init0_B  = mu0 + Rgas*vartheta*(log(1-phi_init0)+ phi_init0*(1+chi*phi_init0)-Omega*(c1_init0_B+c2_init0_B+c4_init0)*(phi_init0)/(1-phi_init0))
**
omg1_init0_B = mu0 + Rgas*vartheta*log(Omega*c1_init0_B*(phi_init0)/(1-phi_init0))
omg2_init0_B = mu0 + Rgas*vartheta*log(Omega*c2_init0_B*(phi_init0)/(1-phi_init0))
**
omg3_init0 = 0.
omg30 = -Rgas*vartheta*log(Omega*c3_init0*(phi_init0)/(1-phi_init0))
**
**
omg4_init0 = 0.
omg40 = -Rgas*vartheta*log(Omega*c4_init0*(phi_init0)/(1-phi_init0))
** *(phi_init0)/(1-phi_init0)
**
phi_init = 1/3.2
**1/3.215
c1_init_A = c1_init0_A
**
c2_init_A = c2_init0_A
**
c1_init_B = c1_init0_B
**
c2_init_B = c2_init0_B
**
omg_init_A  = mu0 + Rgas*vartheta*(log(1-phi_init)+ phi_init*(1+chi*phi_init)-Omega*(c1_init_A+c2_init_A+c3_init0)*(phi_init)/(1-phi_init))
**
omg1_init_A = mu0 + Rgas*vartheta*log(Omega*c1_init_A*(phi_init)/(1-phi_init))
omg2_init_A = mu0 + Rgas*vartheta*log(Omega*c2_init_A*(phi_init)/(1-phi_init))
omg3_init_A = omg30 + Rgas*vartheta*log(Omega*c3_init0)
** *phi_init/(1-phi_init)
**
omg_init_B  = mu0 + Rgas*vartheta*(log(1-phi_init)+ phi_init*(1+chi*phi_init)-Omega*(c1_init_B+c2_init_B+c4_init0)*(phi_init)/(1-phi_init))
**
omg1_init_B = mu0 + Rgas*vartheta*log(Omega*c1_init_B*(phi_init)/(1-phi_init))
omg2_init_B = mu0 + Rgas*vartheta*log(Omega*c2_init_B*(phi_init)/(1-phi_init))
omg4_init_B = omg40 + Rgas*vartheta*log(Omega*c4_init0)
**
c1_sol1 = 1000.
c3_sol1 = 0.5625*1.e-6*1.e3
c4_sol1 = 0.1778*1.e-7*1.e3
c2_sol1 = 1000.
**
**omg_sol1 = omg_init
**omg1_sol1 = omg1_init
**omg2_sol1 = omg2_init
**
**omg_init=omg_init0
**omg1_init=omg1_init0
**omg2_init=omg2_init0
**
omg_sol1 = mu0 - Rgas*vartheta*Omega*(c1_sol1+c2_sol1+c3_sol1)
**omg_sol1 = 0.9*omg_init
omg1_sol1 = mu0 +  Rgas*vartheta*log(Omega*c1_sol1)
omg2_sol1 = mu0 +  Rgas*vartheta*log(Omega*c2_sol1)
********************
omg3_sol1 = omg30 + Rgas*vartheta*log(Omega*c3_sol1)
omg4_sol1 = omg40 + Rgas*vartheta*log(Omega*c4_sol1)
**
c3_sol2 = 0.5625*1.e-6*1.e3
omg3_sol2 = omg30 + Rgas*vartheta*log(Omega*c3_sol2)
c4_sol2 = 0.1778*1.e-7*1.e3
omg4_sol2 = omg40 + Rgas*vartheta*log(Omega*c4_sol2)
**
c3_sol3 = 0.5625*1.e-8*1.e3
omg3_sol3 = omg30 + Rgas*vartheta*log(Omega*c3_sol3)
c4_sol3 = 0.1778*1.e-5*1.e3
omg4_sol3 = omg40 + Rgas*vartheta*log(Omega*c4_sol3)
**
c3_sol4 = 0.5625*1.e-4*1.e3
omg3_sol4 = omg30 + Rgas*vartheta*log(Omega*c3_sol4)
c4_sol4 = 0.1778*1.e-9*1.e3
omg4_sol4 = omg40 + Rgas*vartheta*log(Omega*c4_sol4)
********************
c1_sol2 = 100.
c2_sol2 = 100.
**
omg_sol2  = mu0 - Rgas*vartheta*Omega*(c1_sol2+c2_sol2)
omg1_sol2 = mu0 +  Rgas*vartheta*log(Omega*c1_sol2)
omg2_sol2 = mu0 +  Rgas*vartheta*log(Omega*c2_sol2)
***************
omg_diff1 = omg_sol1-omg_sol2
omg1_diff1 = omg1_sol1-omg1_sol2
omg2_diff1 = omg2_sol1-omg2_sol2
**
omg_diff2 = omg_sol2-omg_sol1
omg1_diff2 = omg1_sol2-omg1_sol1
omg2_diff2 = omg2_sol2-omg2_sol1
**
** Integer parameters
nlSdv = 3
ngSdv = 3
nInt = 4
nvars = nlSdv*nInt
**
** ~~~~~~~~~~~~~~~~~~~~~~~~~~~~~~~~~~~~~~~~~~~~~~~~~~~~~~~~~~~~~~~~~~~~~
** 			INPUTS
** ~~~~~~~~~~~~~~~~~~~~~~~~~~~~~~~~~~~~~~~~~~~~~~~~~~~~~~~~~~~~~~~~~~~~~
**
** major dimensions of plate (m)
xlength = 1.69e-3
**
ylength = 6.77e-3/2
**
** number of elements along each direction
xElem = 10
yElem = 10
**
**
** ~~~~~~~~~~~~~~~~~~~~~~~~~~~~~~~~~~~~~~~~~~~~~~~~~~~~~~~~~~~~~~~~~~~~~
** 			GEOMETRY GENERATION
** ~~~~~~~~~~~~~~~~~~~~~~~~~~~~~~~~~~~~~~~~~~~~~~~~~~~~~~~~~~~~~~~~~~~~~
**
**
** Nodes at the vertices:
*Node, nset = nall
      1, 0.00499999989, 5.99999985e-05,           0.
      2, 0.00499999989,           0., 0.000300000014
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**
**
**
** Declare user element
*User Element,Nodes=8,Type=U1,Iproperties=2,Properties=24,Coordinates=3,Variables=40,Unsymm
1,2,3,11,12,13,14,15,16
**
*element, type=U1, elset=el_real_polyA
  1, 263, 264, 783, 691,  10,  11, 164, 163
  2, 264,  45, 170, 783,  11,   1,  12, 164
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**
** call to *elgen which meshes the plate geometry
** "Master Element" for *Elgen
*element, type=C3D8H, elset=el_dummy_polyA
10001,263,264,783,691,10,11,164,163
10002,264,45,170,783,11,1,12,164
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**
*element, type=U1, elset=el_real_polyC
385,  463,  464, 1000,  908,  121,  122,  457,  456
386,  464,   49,  202, 1000,  122,    2,   14,  457
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**
** call to *elgen which meshes the plate geometry
** "Master Element" for *Elgen
*element, type=C3D8H, elset=el_dummy_polyC
10385,463,464,1000,908,121,122,457,456
10386,464,49,202,1000,122,2,14,457
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**
*****************************
**
*Nset, nset=bottom
   2,   3,   4,   6,  46,  47
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*Elset, elset=bottom
  66,  68,  70,  72,  74,  76
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*Nset, nset=top
   1,   5,   7,   8,  15,  16
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*Elset, elset=top
 450, 452, 454, 456, 458, 460
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*Nset, nset=left
   4,   5,   6,   8, 111, 112
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*Elset, elset=left
 193, 194, 225, 226, 272, 288
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*Nset, nset=left_back_bottom
 6,
*Nset, nset=right
   1,   2,   3,   7,   9,  10
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*Elset, elset=right
   1,   2,   3,   4,  65,  66
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*Nset, nset=front
   2,   4,   7,   8,  49,  50
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*Elset, elset=front
 385, 386, 389, 390, 393, 394
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*Nset, nset=back
   1,   3,   5,   6,   9,  10
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*Elset, elset=back
   1,   2,   5,   6,   9,  10
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*Nset, nset=left_bottom
   4,   6, 114, 115, 116
*Elset, elset=left_bottom
 194, 226, 322, 324
*Nset, nset=outer
   1,   2,   3,   4,   5,   6
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*Elset, elset=outer
   1,   2,   3,   4,   5,   6
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 *Nset, nset=left_back
   5,   6, 117, 118, 119
*Elset, elset=left_back
 272, 304, 321, 322
***************************************************
*Elset,elset=el_dummy
el_dummy_polyA,el_dummy_polyC
***************************************************
** Constraint: tied
***Tie, name=tied, adjust=yes, no rotation
**s_Set-1_CNS_, m_Set-1_CNS_
*Nset, Nset=ref_node
9999
*Nset, Nset=ref_node2
9998
**
************************************************************************
**			MATERIAL DEFINITION
************************************************************************
**
** Material properties for the real mesh
**
*uel property,elset=el_real_polyA
*******************************************************************
**Gshear      Kbulk	     chi	   D	mu0	     Vmol	     Rgas	theta
<Gshear>,	<Kbulk>,	<chi>,	  <D>,	<mu0>,	<Omega>,	<Rgas>,	<vartheta>,
**
**phi0,             permitt,   DiffP, Ka,      cbarP0,      zP_mob,   DiffN,  cRmaxN
<phi_init0>,	  8.85e-12,   <D1>,  <Ka_COOH>,  <c1_init0_A>,   <z1_val>,     <D2>,  <key0>,
**
**     cbarN0,      zN_mob,           cRf,   zf 	       cOH0       zOH_mob    DiffOH, <omgOH0>
      <c2_init0_A>,   <z2_val>,     <c_bound_A>, <z_bound_A>,     <c3_init0>, <z3_val>, <D3> ,  <omg30>
** 0.25,   -1,     1000,   1,      3,	3
**     nlSdv	ngSdv
		5,	     7
*******************************************************************
********************************************************
*uel property,elset=el_real_polyC
*******************************************************************
**Gshear      Kbulk	     chi	   D	mu0	     Vmol	     Rgas	theta
<Gshear>,	<Kbulk>,	<chi>,	  <D>,	<mu0>,	<Omega>,	<Rgas>,	<vartheta>,
**
**phi0,             permitt,   DiffP, Ka,      cbarP0,      zP_mob,   DiffN,  cRmaxN
<phi_init0>,	  8.85e-12,   <D1>,  <Kb_NH3>,  <c1_init0_B>,   <z1_val>,     <D2>,  <key1>,
**
**     cbarN0,      zN_mob,           cRf,   zf 	       cOH0       zOH_mob    DiffOH, <omgOH0>
      <c2_init0_B>,   <z2_val>,     <c_bound_B>, <z_bound_B>,     <c4_init0>, <z4_val>, <D4> ,  <omg40>
** 0.25,   -1,     1000,   1,      3,	3
**     nlSdv	ngSdv
		5,	     7
********************************************************
** Dummy mesh material properties
**
*Solid section, elset=el_dummy, material=umaterial
***Hourglass Stiffness
**80.e-20
**
*Material, name=umaterial
**
*Elastic
1e-20, 0.3
*User output variables
7
**
** *user material, constant=0
** **
** *Depvar
** 19
** 1, cbar
** 2, T11
** 3, T22
** 4, T12
** 5, T33
** 6, Tes11
** 7, Tes22
** 8, Tes12
** 9, Tes33
** 10, Tme11
** 11, Tme22
** 12, Tme12
** 13, Tme33
** 14, e1
** 15, e2
** 16, j1
** 17, j2
** 18, pbar
** 19, Js
**
**
*Density
1.0
**
*Specific heat
1.0
**
**
************************************************************************
**			BOUNDARY CONDITIONS
************************************************************************
** 2
** right,1,-1.0
** ref_node,1,1.0
**
***EQUATION
**2
**front,3,1.0
**ref_node,3,-1.0
**
***EQUATION
**2
**back,3,1.0
**ref_node2,3,-1.0
************************************************************************
**			INITIAL CONDITIONS
************************************************************************
**
*Initial conditions, type=temperature
nall, 0., <omg_init0_A>, <omg1_init0_A>, <omg2_init0_A>, 0., 0.
**nall_lower,  0., 0., <omg_init0_B>, <omg1_init0_B>, <omg2_init0_B>
**, <omg1_init>, <omg2_init>
************************************************************************
**			AMPLITUDE DEFINITION
************************************************************************
**
*Amplitude, name=amp_1_A
0.,<omg_init0_A>, <tramp>, <omg_init_A>, <tload>, <omg_init_A>
*Amplitude, name=amp_1b_A
0.,<omg1_init0_A>, <tramp>, <omg1_init_A>, <tload>, <omg1_init_A>
*Amplitude, name=amp_1c_A
0.,<omg2_init0_A>, <tramp>, <omg2_init_A>, <tload>, <omg2_init_A>
*Amplitude, name=amp_1d_A
0.,<omg3_init0>, <tramp>, <omg3_init_A>, <tload>, <omg3_init_A>
*Amplitude, name=amp_1_B
0.,<omg_init0_B>, <tramp>, <omg_init_B>
*Amplitude, name=amp_1b_B
0.,<omg1_init0_B>, <tramp>, <omg1_init_B>
*Amplitude, name=amp_1c_B
0.,<omg2_init0_B>, <tramp>, <omg2_init_B>
*Amplitude, name=amp_1d_B
0.,<omg4_init0>, <tramp>, <omg4_init_B>, <tload>, <omg4_init_B>
*******
*Amplitude, name=amp_cycle_A
**, definition= Smooth Step
0.,<omg_init_A>,<tramp>,<omg_sol1>,<tload>,<omg_sol1>
*Amplitude, name=amp_cycle1_A
**, definition= Smooth Step
0.,<omg1_init_A>,<tramp>,<omg1_sol1>,<tload>,<omg1_sol1>
*Amplitude, name=amp_cycle2_A
**, definition= Smooth Step
0.,<omg2_init_A>,<tramp>,<omg2_sol1>,<tload>,<omg2_sol1>
*Amplitude, name=amp_cycle3_A
**, definition= Smooth Step
0.,<omg3_init_A>,<tramp>,<omg3_sol1>,<tload>,<omg3_sol1>
**
*Amplitude, name=amp_cycle_B
**, definition= Smooth Step
0.,<omg_init_B>,<tramp>,<omg_sol1>,<tload>,<omg_sol1>
*Amplitude, name=amp_cycle1_B
**, definition= Smooth Step
0.,<omg1_init_B>,<tramp>,<omg1_sol1>,<tload>,<omg1_sol1>
*Amplitude, name=amp_cycle2_B
**, definition= Smooth Step
0.,<omg2_init_B>,<tramp>,<omg2_sol1>,<tload>,<omg2_sol1>
*Amplitude, name=amp_cycle3_B
**, definition= Smooth Step
0.,<omg4_init_B>,<tramp>,<omg4_sol1>,<tload>,<omg4_sol1>
****
*Amplitude, name=amp_Sol, definition= Smooth Step
0.,<omg_sol1>,<tload1>,<omg_sol2>
*Amplitude, name=amp_pos, definition= Smooth Step
0.,<omg1_sol1>,<tload1>,<omg1_sol2>
*Amplitude, name=amp_neg, definition= Smooth Step
0.,<omg2_sol1>,<tload1>,<omg2_sol2>
*Amplitude, name=amp_pH1, definition= Smooth Step
0.,<omg3_sol1>,<tload1>,<omg3_sol2>,<tload2>,<omg3_sol2>,<tload3>,<omg3_sol3>
<tload4>,<omg3_sol3>
*Amplitude, name=amp_pH2
**, definition= Smooth Step
0.,<omg3_sol2>,<tload1b>,<omg3_sol3>,<tload2b>,<omg3_sol3>
*Amplitude, name=amp_pH3, definition= Smooth Step
0.,<omg3_sol3>,<tload0b>,<omg3_sol2>,<tload1b>,<omg3_sol4>,<tload2b>,<omg3_sol4>
**,<tload3>,<omg3_sol1>
**<tload4>,<omg3_sol1>
*Amplitude, name=amp_pH1_, definition= Smooth Step
0.,<omg4_sol1>,<tload1>,<omg4_sol2>,<tload2>,<omg4_sol2>,<tload3>,<omg4_sol3>
<tload4>,<omg4_sol3>
*Amplitude, name=amp_pH2_
**, definition= Smooth Step
0.,<omg4_sol2>,<tload1b>,<omg4_sol3>,<tload2b>,<omg4_sol3>,<tload3>,<omg4_sol1>
<tload4>,<omg4_sol1>
*Amplitude, name=amp_pH3_, definition= Smooth Step
0.,<omg4_sol3>,<tload0b>,<omg4_sol2>,<tload1b>,<omg4_sol4>,<tload2b>,<omg4_sol4>
************************************************************************
**			STEP DEFINITION
************************************************************************
************************************************************************
*Step, Name=swell, nlgeom=yes, inc=50000
*Coupled temperature-displacement, deltmx=2000, stabilize, factor=0.001
<ti>,<tload>,<tmin>,<tlim>
*CONTROLS, PARAMETERS=TIME INCREMENTATION
,,,,,,,30,,,,,,
***Solution technique, type=separated
***CONTROLS, PARAMETERS=LINE SEARCH
**10,1.0,0.0001,0.25,0.10
**
** 	DISPLACEMENT B.C.
*Boundary,op=mod
left,1,1,0.
left_bottom,2,2,0.
left_back,3,3,0.
**left_front_bottom,2,2,0.
**back,3,3,0.
**front,3,3
**left_back_bottom,2,3
**left_front_bottom,2,2
**
**nall,12,12,0.
**nall,4,4,0.
*Boundary,amplitude=amp_1_A
nall,12,12,1.
*Boundary,amplitude=amp_1b_A
nall,13,13,1.
*Boundary,amplitude=amp_1c_A
nall,14,14,1.
*Boundary,amplitude=amp_1d_A
nall,15,15,1.
*Boundary,amplitude=amp_1d_B
nall,16,16,1.
**
**
**	OUTPUTS
**
*Output, field
**, number interval=40
*node output, nset=nall
u,nt
*Element output, elset=el_dummy
le,UVARM
**
*Output, history
*Element output, elset=el_dummy
UVARM1
***Node output, nset=ref_node
**rf2
*End Step
************************************************************************
*Step, Name=equilibriate1, nlgeom=yes, inc=50000
*Coupled temperature-displacement, deltmx=2000, stabilize, factor=0.001
<ti>,<tload>,<tmin>,<tlim>
*CONTROLS, PARAMETERS=TIME INCREMENTATION
,,,,,,,30,,,,,,
***Solution technique, type=separated
*CONTROLS, PARAMETERS=LINE SEARCH
10,1.0,0.0001,0.25,0.10
**
** 	DISPLACEMENT B.C.
*Boundary,op=new
left,1,1,0.
left_bottom,2,2,0.
**left_back,3,3,0.
left_back_bottom,2,3,0.
**left_front_bottom,2,2,0.
**back,3,3,0.
**left_back_bottom,2,3
**left_front_bottom,2,2
**
**nall,5,5,0.
**nall_upper,12,12,0.
**nall_lower,12,12,0.
**nall,4,4,0.
**nall,12,12,<omg1_init>
**nall,13,13,<omg2_init>
**nall,11,11,<omg_init>
**
*Boundary,amplitude=amp_cycle_A,op=new
nall,12,12,1.
outer,12,12,1.
*Boundary,amplitude=amp_cycle1_A,op=new
nall,13,13,1.
outer,13,13,1.
*Boundary,amplitude=amp_cycle2_A,op=new
nall,14,14,1.
outer,14,14,1.
*Boundary,amplitude=amp_cycle3_A,op=new
nall,15,15,1.
outer,15,15,1.
*Boundary,amplitude=amp_cycle3_B,op=new
nall,16,16,1.
outer,16,16,1.
**
**	OUTPUTS
**
*Output, field
**, number interval=40
*node output, nset=nall
u,nt
*Element output, elset=el_dummy
le,UVARM
**
*Output, history
***Node output, nset=ref_node
**rf2
*End Step
************************************************************************
************************************************************************
*Step, Name=equilibrate2, nlgeom=yes, inc=50000
*Coupled temperature-displacement, deltmx=2000, stabilize
**, stabilize, factor=0.005
<ti>,<tload2>,<tmin>,<tlim2>
*CONTROLS, PARAMETERS=TIME INCREMENTATION
,,,,,,,30,,,,,,
***Solution technique, type=separated
*CONTROLS, PARAMETERS=LINE SEARCH
10,1.0,0.0001,0.25,0.10
**
** 	DISPLACEMENT B.C.
*Boundary,op=new,type=velocity
left,1,1,0.
left_bottom,2,2,0.
**left_back,3,3,0.
left_back_bottom,2,3,0.
**back,3,3,0.
**back,3,3
**bottom,2,2
**left_back_bottom,2,3
**left_front_bottom,2,2
**
*Boundary, amplitude=amp_sol, op=new
outer,12,12,1.
*Boundary, amplitude = amp_pos, op=new
outer,13,13,1.
*Boundary, amplitude = amp_neg, op=new
outer,14,14,1.
**
*Boundary,amplitude=amp_pH1,op=new
outer,15,15,1.
*Boundary,amplitude=amp_pH1_,op=new
outer,16,16,1.
**
**	OUTPUTS
**
*Output, field
**, number interval=40
*node output, nset=nall
u,nt
*Element output, elset=el_dummy
le,UVARM
**
*Output, history
***Node output, nset=ref_node
**rf2
*End Step
************************************************************************
*Step, Name=increase, nlgeom=yes, inc=50000
*Coupled temperature-displacement, deltmx=2000
**, stabilize, factor= 0.005
<ti>,<tload2b>,<tmin>,0.25
*CONTROLS, PARAMETERS=TIME INCREMENTATION
,,,,,,,30,,,,,,
***Solution technique, type=separated
*CONTROLS, PARAMETERS=LINE SEARCH
10,1.0,0.0001,0.25,0.10
**
** 	DISPLACEMENT B.C.
*Boundary,op=new,type=velocity
left,1,1,0.
left_bottom,2,2,0.
**left_back,3,3,0.
left_back_bottom,2,3,0.
**back,3,3,0.
**back,3,3
**bottom,2,2
**left_back_bottom,2,3
**left_front_bottom,2,2
**
*Boundary, op=new
outer,12,12,<omg_sol2>
outer,13,13,<omg1_sol2>
outer,14,14,<omg2_sol2>
**
*Boundary,amplitude=amp_pH2,op=new
outer,15,15,1.
*Boundary, amplitude=amp_pH2_,op=new
outer,16,16,1.
**
**	OUTPUTS
**
*Output, field
**, number interval=40
*node output, nset=nall
u,nt
*Element output, elset=el_dummy
le,UVARM
**
*Output, history
***Node output, nset=ref_node
**rf2
*End Step
************************************************************************
*Step, Name=decrease, nlgeom=yes, inc=50000
*Coupled temperature-displacement, deltmx=2000
**, stabilize
<ti>,<tload2b>,<tmin>,0.25
*CONTROLS, PARAMETERS=TIME INCREMENTATION
,,,,,,,30,,,,,,
***Solution technique, type=separated
*CONTROLS, PARAMETERS=LINE SEARCH
10,1.0,0.0001,0.25,0.10
**
** 	DISPLACEMENT B.C.
*Boundary,op=new,type=velocity
left,1,1,0.
left_bottom,2,2,0.
**left_back,3,3,0.
left_back_bottom,2,3,0.
**back,3,3,0.
**back,3,3
**bottom,2,2
**left_back_bottom,2,3
**left_front_bottom,2,2
**
*Boundary, op=new
outer,12,12,<omg_sol2>
outer,13,13,<omg1_sol2>
outer,14,14,<omg2_sol2>
**
*Boundary,amplitude=amp_pH3,op=new
outer,15,15,1.
*Boundary, amplitude=amp_pH3_,op=new
outer,16,16,1.
**
**	OUTPUTS
**
*Output, field
**, number interval=40
*node output, nset=nall
u,nt
*Element output, elset=el_dummy
le,UVARM
**
*Output, history
***Node output, nset=ref_node
**rf2
*End Step
************************************************************************
