**************************************************************************
**INPUT DECK FOR LITHIUM DEPOSITION IN A CAVITY
**
***************************************************************************
*HEADING
CAVITY DEPOSITION
************************************************************************-
**
**	UNITS:	Length - microns = 1e-6 meters
**		Mass - kg
**		Time - sec
**		Angle - radians
**		Temperature - Kelvin
**		Amount of substance - 1e-12 mol
****************
**		Force - 1.e-6 N
**		Stress - 1.e6 Pa = 1 MPa
**		Energy - 1e-12 J
**		Chemical Potential - J/mol
**		Diffusivity - 1e-12 m^2/s
**		Concentration - 1e6 mol/m^3
**              flux          - mol/(m^2 s)
**
************************************************************************
**			PARAMETERS for Lithium
************************************************************************
*Parameter
*******cDot = 1.e-3 ----------------OLD VALUES
*******Omega = 13.e0 ---------------OLD VALUES
**
**
Omega =13.e-6
**
**
i=5
**Current in mA/cm2
Farad=96485
V_by_A = 0.538
**18.13(Area of IP from CAE)/33.69(length of top_surf)
**thickness in microns for interphase layer
cDot = 1.e7*i/Farad/V_by_A
**cDot = 0.
**
cMax = 5.e5
tload=cMax/cDot
**
cLim = 3.e2
tMax = cLim/cDot
**For aniso
alpha1 = 0.e0
alpha2 = 1.e0
alpha3 = 0.e0
**
********************************************************************
********************************************************************
*Node, nset=se
      1,           0.,          3.5
      2,    1.4815383,   2.23461533
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*Element, type=CPE4, elset= se_right
  1, 658, 609, 615, 817
  2, 271,  85,  86, 272
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*Element, type=CPE4, elset= se_left
17121, 17569, 17570, 17858, 17859
17122, 17570, 17571, 17857, 17858
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*Nset, nset=se_right_bottom
   5,   6,   7,   8,   9,  69
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*Elset, elset=se_right_bottom
  2,   3,   4,   5,   6,   8
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*Nset, nset=se_right_top
  879, 880, 892, 893, 894, 895
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*Elset, elset=se_right_top
  770,  789,  806,  933, 1125, 1156
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*Nset, nset=se_right_left
  1,   5,  52,  53,  54,  55
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*Elset, elset=se_right_left
   54,  55,  59,  96,  97,  98
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*Nset, nset=se_right_right
   4,   9, 209, 210, 211, 212
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*Elset, elset=se_right_right
  30,  201,  202,  349,  350,  770
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*Elset, elset=_se_right_bot_surf_S4
3,   4,   9,  11,  12,  14
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*Elset, elset=_se_right_bot_surf_S2
  2,   5,   6,   8,  10,  28
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*Elset, elset=_se_right_bot_surf_S3
121, 151, 178
*Surface, type=ELEMENT, name=se_right_bot_surf
_se_right_bot_surf_S4, S4
_se_right_bot_surf_S2, S2
_se_right_bot_surf_S3, S3
*Elset, elset=se_right_left_surf_S2
  54,  59,  96,  97, 103, 110
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*Elset, elset=se_right_left_surf_S4
  55,  98, 104, 107, 109, 111
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*Elset, elset=se_right_left_surf_S3
 113, 801
*Elset, elset=se_right_left_surf_S1
 114, 806
*Surface, type=ELEMENT, name=se_right_left_surf
se_right_left_surf_S2, S2
se_right_left_surf_S4, S4
se_right_left_surf_S3, S3
se_right_left_surf_S1, S1
*Elset, elset=se_right_top_surf_S2
 1160,1197,1424
*Elset, elset=se_right_top_surf_S4
 770,806,1156,1199,1450,1454
*Elset, elset=se_right_top_surf_S3
 789,1455,1456,1471
*Elset, elset=se_right_top_surf_S1
 933,1125,1433,1469,1475
*Surface, type=ELEMENT, name=se_right_top_surf
se_right_top_surf_S2, S2
se_right_top_surf_S4, S4
se_right_top_surf_S3, S3
se_right_top_surf_S1, S1
********************
*Nset, nset=se_left_bottom
   17564,17565,17566,17567,17568,17680
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*Nset, nset=se_left_top
  17560,17561,17627,17628,17629,17630
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*Nset, nset=se_left_right
  17559,17560,17568,17582,17583,17584
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*Nset, nset=se_left_left
   17561,17562,17564,17643,17644,17645,17646,17647,17677,17678,17679
*Elset, elset=_se_left_bot_surf_S1
17814,17820,17826,17830,17834,17842
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*Elset, elset=_se_left_bot_surf_S3
17807,17813,17815,17838,17915,17918
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*Elset, elset=_se_left_bot_surf_S2
17914,17994
*Elset, elset=_se_left_bot_surf_S4
17988,18020
*Surface, type=ELEMENT, name=se_left_bot_surf
_se_left_bot_surf_S1, S1
_se_left_bot_surf_S3, S3
_se_left_bot_surf_S2, S2
_se_left_bot_surf_S4, S4
*Elset, elset=se_left_right_surf_S3
   17140,17142,17150,17153,17156,17159
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*Elset, elset=se_left_right_surf_S1
  17128,17141,17143,17144,17145,17146
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*Elset, elset=se_left_right_surf_S4
 17137,17139,18003
*Surface, type=ELEMENT, name=se_left_right_surf
se_left_right_surf_S3, S3
se_left_right_surf_S1, S1
se_left_right_surf_S4, S4
*Elset, elset=se_left_top_surf_S3
 17138,17529,17702,17741,17735,17739
*Elset, elset=se_left_top_surf_S1
17137,17299,17385,17341,17451,17495,17717,17748,17760,17763,17175
*Surface, type=ELEMENT, name=se_left_top_surf
se_left_top_surf_S3, S3
se_left_top_surf_S1, S1
** ----------------------------------------------------------------
**
*Surface, type=ELEMENT, name=se_bot_surf
_se_left_bot_surf_S1, S1
_se_left_bot_surf_S4, S4
_se_left_bot_surf_S2, S2
_se_left_bot_surf_S3, S3
_se_right_bot_surf_S4, S4
_se_right_bot_surf_S2, S2
_se_right_bot_surf_S3, S3
*********************************************************************************************************
*********************************************************************************************************
*Node, nset=Li
1648,   2.59707856,           0.
   1649,   2.59707856,         -0.5
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*Element, type=CPE4H, elset=Li
1526, 1648, 1681, 2799, 1740
1527, 1681, 1682, 2800, 2799
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*Nset, nset=Li_left
1668,1669,1674,2098,2099,2100
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*Elset, elset=Li_left
 3713, 3714, 3715, 3716, 3717, 3718
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*Nset, nset=Li_right
 1662, 1663, 1680, 1941, 1942, 1943
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*Elset, elset=sub
  4329,  4330,  4331,  4332,  4333,  4334
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*Nset, nset=ip
  1648,  1649,  1650,  1651,  1652,  1653
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*Elset, elset=ip
  1526,  1527,  1528,  1529,  1530,  1531
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*Nset, nset=sub_bottom
 1672, 1674, 1680, 2303, 2304, 2305
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*Elset, elset=sub_bottom
  4329,  4330,  4332,  4333,  4338,  4391
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*Elset, elset=ip_right_left_surf_S3
 3713, 3714, 3715, 3716, 3717, 3718
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*Elset, elset=ip_right_left_surf_S4
 4389, 4558, 4627, 4628
*Elset, elset=ip_right_left_surf_S2
 4567, 4867, 6729
*Surface, type=ELEMENT, name=ip_right_left_surf
ip_right_left_surf_S3, S3
ip_right_left_surf_S4, S4
ip_right_left_surf_S2, S2
*Elset, elset=ip_right_top_surf_S4
  1526,  1539,  1552,  1565,  1578,  1591
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*Elset, elset=ip_right_top_surf_S2
  2900,  2913,  2926,  2939,  2952,  2965
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*Elset, elset=ip_right_top_surf_S3
 11000, 11005, 11009, 11012, 11213, 11243
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*Elset, elset=ip_right_top_surf_S1
 11004, 11006, 11007, 11008, 11011, 11192
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*Surface, type=ELEMENT, name=ip_right_top_surf
ip_right_top_surf_S4, S4
ip_right_top_surf_S2, S2
ip_right_top_surf_S3, S3
ip_right_top_surf_S1, S1
*Elset, elset=ip_left_top_surf_S2
 1786, 1800, 1814, 1828, 1842, 1856
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*Elset, elset=ip_left_top_surf_S4
 3727, 3741, 3755, 3769, 3783, 3797
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*Elset, elset=ip_left_top_surf_S1
 7363,
*Surface, type=ELEMENT, name=ip_left_top_surf
ip_left_top_surf_S2, S2
ip_left_top_surf_S4, S4
ip_left_top_surf_S1, S1
*Elset, elset=sub_bot_surf_S3
  4329, 15078, 15080, 15121, 15191, 17059, 17062
*Elset, elset=sub_bot_surf_S4
 4330, 4338, 4393, 4396
*Elset, elset=sub_bot_surf_S2
 4332, 4333, 4391, 4392, 4394, 4569, 4570, 4571, 6734
*Elset, elset=sub_bot_surf_S1
  6733, 15101, 15106, 15110, 15113, 15114, 15128, 15189, 15190, 15192
*Surface, type=ELEMENT, name=sub_bot_surf
sub_bot_surf_S3, S3
sub_bot_surf_S4, S4
sub_bot_surf_S2, S2
sub_bot_surf_S1, S1
*Elset, elset=ip_top_surf_S2
  1786,  1800,  1814,  1828,  1842,  1856
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*Elset, elset=ip_top_surf_S4
  1526,  1539,  1552,  1565,  1578,  1591
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*Elset, elset=ip_top_surf_S1
  7363, 11004, 11006, 11007, 11008, 11011
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*Elset, elset=ip_top_surf_S3
 11000, 11005, 11009, 11012, 11213, 11243
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*Surface, type=ELEMENT, name=ip_top_surf
ip_top_surf_S2, S2
ip_top_surf_S4, S4
ip_top_surf_S1, S1
ip_top_surf_S3, S3
***********
*Elset,elset=se
se_right,se_left
*Surface, type=Node, name=se_left_right_nsurf
se_left_right
*Surface, type=Node, name=se_right_left_nsurf
se_right_left
************************************************************************
**			MATERIAL DEFINITION
************************************************************************
**
*Solid section, elset=ip, material=ip
** Material properties for the real mesh for Li
**
*Material, name=ip
*User material, Constants=16
**Eyoung poisson   Apre    Qact  To    mRate    Y0       Ho
  7.81e3,   0.38,  4.254E4, 37., 298., 0.15,   0.95E0,   10.E0
** Ysat   ahard nhard
  2.0E0,   2.0, 0.05, <Omega>, <alpha1>,<alpha2>,<alpha3>,<cDot>
**
*Depvar
24
10,nuP
12,Y
14,ebarp
15,conc
**
*Solid section, elset=sub, material=Li_sub
***********************************************
**
*Material, name=Li_sub
*User material, Constants=16
**Eyoung poisson   Apre    Qact  To    mRate    Y0       Ho
  7.81e3,   0.38,  4.254E4, 37., 298., 0.15,   0.95E0,   10.E0
** Ysat   ahard nhard
  2.0E0,   2.0, 0.05, <Omega>, <alpha1>,<alpha2>,<alpha3>,0.
**
*Depvar
24
10,nuP
12,Y
14,ebarp
15,conc
**
**
*Solid section, elset=se, material= Ceramic
*Material, name=Ceramic
*Elastic
172.e3, 0.3
************************************************************************
**			INTERACTION
************************************************************************
** INTERACTION PROPERTIES
**
*Surface Interaction, name=Cohesive
***Cohesive Behavior, Eligibility = SPECIFIED CONTACTS
*Cohesive Behavior
150.e5,150.e5, 150.e5
*Damage Initiation, criterion=QUADS
100.e0,100.e0, 100.e0
***Damage Evolution, type=ENERGY, mixed mode behavior=POWER LAW, power=1.
**1.e0,1.e0,1.e0
*Damage Evolution, type=ENERGY
6.67e0
**10.e0
*Damage Stabilization
1.E-5
**
*Contact Pair,adjust=0.005,inter=cohesive
se_left_right_surf,se_right_left_surf
*TIE,adjust=yes, name=tiedsurf
ip_top_surf,se_bot_surf
**Li_right_left_surf,Li_left_right_surf
**Li_left_right_nsurf,Li_right_left_nsurf
************************************************************************
**			AMPLITUDE
************************************************************************
*Amplitude, name=amp_new
0.,0.,1.,1.,500.,1.
************************************************************************
****			INITIAL CONDITIONS
************************************************************************
************************************************************************
**			SIMULATION STEP
************************************************************************
*Step, Name=Swell, nlgeom=yes, inc=500000
*Static
0.001,500.,1.e-6,40.
*CONTROLS, PARAMETERS=LINE SEARCH
10,1.0,0.0001,0.25,0.10
*CONTROLS, PARAMETERS=TIME INCREMENTATION
,,,,,,,20,,,,,,
*** *CONTROLS, PARAMETERS=FIELD, FIELD=DISPLACEMENT
*** ,1.0,,,,,1.0,
**
**	DISPLACEMENT B.C.
**
**
*Boundary, op=new
se_right_top,2,2
se_left_top,2,2
se_left_left,1,1
Li_left,1,1
se_right_right,1,1
Li_right,1,1
sub_bottom,2,2,0.0005
**
***Dsload, amplitude=amp_new
**sub_bot_surf,P,0.5
**
**************************************************
*Output, field, frequency=20
*node output, nset=Li
u
*node output, nset=se
u
*element output
S,E,sdv
*contact output, nset=se_left_right
CSDMG
*End Step
************************************************************************
