**************************************************************************
**INPUT DECK FOR LITHIUM DEPOSITION IN A CAVITY
**
***************************************************************************
*HEADING
CAVITY DEPOSITION
************************************************************************-
**
**	UNITS:	Length - microns = 1e-6 meters
**		Mass - kg
**		Time - sec
**		Angle - radians
**		Temperature - Kelvin
**		Amount of substance - 1e-12 mol
****************
**		Force - 1.e-6 N
**		Stress - 1.e6 Pa = 1 MPa
**		Energy - 1e-12 J
**		Chemical Potential - J/mol
**		Diffusivity - 1e-12 m^2/s
**		Concentration - 1e6 mol/m^3
**              flux          - mol/(m^2 s)
**
************************************************************************
**			PARAMETERS for Lithium
************************************************************************
*Parameter
*******cDot = 1.e-3 ----------------OLD VALUES
*******Omega = 13.e0 ---------------OLD VALUES
**
**
Omega =13.e-6
**
**
i=5
**Current in mA/cm2
Farad=96485
V_by_A = 0.538
**18.13(Area of IP from CAE)/33.69(length of top_surf)
**thickness in microns for interphase layer
cDot = 1.e7*i/Farad/V_by_A
**cDot = 0.
**
cMax = 5.e5
tload=cMax/cDot
**
cLim = 3.e2
tMax = cLim/cDot
**For aniso
alpha1 = 0.e0
alpha2 = 1.e0
alpha3 = 0.e0
**
********************************************************************
********************************************************************
*Node
      1,           0.,          3.5
      2,    1.4815383,   2.23461533
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*Element, type=CPE4H, elset=se
  1,  19,  20, 283, 497
  2, 432, 434,  75,  76
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*Nset, nset=se_bottom
   7,   8,   9,  10,  11,  99
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*Elset, elset=se_bottom
  334,  335,  336,  337,  338,  340
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*Nset, nset=se_top
  5,  6, 65, 66, 67, 68, 69, 70, 71, 72, 73
*Elset, elset=se_top
  28,  50,  58, 214, 264, 266, 269, 272, 274, 275
*Nset, nset=se_left
  1,  6,  7, 74, 75, 76
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*Elset, elset=se_left
   2,  10,  55,  58, 238, 244
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*Nset, nset=se_right
   4,   5,  11,  54,  55,  56
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*Elset, elset=se_right
  28,  31,  42,  91, 118, 129
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*Elset, elset=se_bot_surf_S4
 335, 336, 341, 343, 344, 346
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*Elset, elset=se_bot_surf_S2
  334,  337,  338,  340,  342,  360
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*Elset, elset=se_bot_surf_S3
 453, 483, 510
*Surface, type=ELEMENT, name=se_bot_surf
se_bot_surf_S4, S4
se_bot_surf_S2, S2
se_bot_surf_S3, S3
*Elset, elset=se_top_surf_S4
 28, 58
*Elset, elset=se_top_surf_S3
  50, 214, 264, 269
*Elset, elset=se_top_surf_S1
 266, 272, 274, 275
*Surface, type=ELEMENT, name=se_top_surf
se_top_surf_S4, S4
se_top_surf_S3, S3
se_top_surf_S1, S1
** ----------------------------------------------------------------
**
** PART INSTANCE: Part-2-1
**
*Node
   1175,   2.59707856,           0.
   1176,   2.59707856,         -0.5
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*Element, type=CPE4H
1075, 1175, 1193, 1679, 1262
1076, 1193, 1194, 1680, 1679
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*Nset, nset=ip
 1175, 1176, 1177, 1178, 1179, 1180
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*Elset, elset=ip, generate
 1075,  3068,     1
*Nset, nset=Li_left
1189,1190,1191,1556,1557,1558
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*Elset, elset=Li_left
 2173, 2175, 2210, 2212, 2224, 2231
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*Nset, nset=Li_right
1181,1182,1192,1298,1299,1300
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*Elset, elset=sub, generate
 3069,  5888,     1
*Nset, nset=sub_bottom
1191,1192,1658,1659,1660,1661,1662,1663,1664,1665,1666,1667,1668,1669,1670,1671
*Elset, elset=sub_bottom
 3074, 3075, 3081, 3088, 3095, 3102, 3110, 3118, 3126, 3275, 3299, 3300, 5792, 5794, 5797
*Elset, elset=sub_bot_surf_S3
 3074, 3081, 3088, 3095, 3102, 3118, 3126, 3299
*Elset, elset=sub_bot_surf_S1
 3075, 3110, 3275, 3300, 5792, 5794, 5797
*Surface, type=ELEMENT, name=sub_bot_surf
sub_bot_surf_S3, S3
sub_bot_surf_S1, S1
*Elset, elset=ip_top_surf_S4
 1075, 1083, 1091, 1099, 1107, 1115
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*Elset, elset=ip_top_surf_S2
 1938, 1946, 1954, 1962, 1970, 1978
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*Elset, elset=ip_top_surf_S1
 2217, 2289, 2374, 2428, 2441, 2442, 2443, 2444, 2450, 2496, 2544, 2545
*Elset, elset=ip_top_surf_S3
 2199, 2200, 2201, 2241, 2243, 2244, 2251, 2275, 2427, 2447, 2491, 2552, 2553, 2557, 2564
*Surface, type=ELEMENT, name=ip_top_surf
ip_top_surf_S4, S4
ip_top_surf_S2, S2
ip_top_surf_S1, S1
ip_top_surf_S3, S3
************************************************************************
**			MATERIAL DEFINITION
************************************************************************
**
*Solid section, elset=ip, material=ip
** Material properties for the real mesh for Li
**
*Material, name=ip
*User material, Constants=16
**Eyoung poisson   Apre    Qact  To    mRate    Y0       Ho
  7.81e3,   0.38,  4.254E4, 37., 298., 0.15,   0.95E0,   10.E0
** Ysat   ahard nhard
  2.0E0,   2.0, 0.05, <Omega>, <alpha1>,<alpha2>,<alpha3>,<cDot>
**
*Depvar
24
10,nuP
12,Y
14,ebarp
15,conc
**
*Solid section, elset=sub, material=Li_sub
***********************************************
**
*Material, name=Li_sub
*User material, Constants=16
**Eyoung poisson   Apre    Qact  To    mRate    Y0       Ho
  7.81e3,   0.38,  4.254E4, 37., 298., 0.15,   0.95E0,   10.E0
** Ysat   ahard nhard
  2.0E0,   2.0, 0.05, <Omega>, <alpha1>,<alpha2>,<alpha3>,0.
**
*Depvar
24
10,nuP
12,Y
14,ebarp
15,conc
**
**
*Solid section, elset=se, material= Ceramic
*Material, name=Ceramic
*Elastic
170.e3, 0.25
************************************************************************
**			INTERACTION
************************************************************************
** INTERACTION PROPERTIES
**
*Surface Interaction, name=Cohesive
***Cohesive Behavior, Eligibility = SPECIFIED CONTACTS
*Cohesive Behavior
7.81e5,7.81e5, 7.81e5
*Damage Initiation, criterion=QUADS
10.e0,10.e0, 10.e0
*Damage Evolution, type=ENERGY
0.67,0.67,0.67
*Damage Stabilization
1.E-5
**
*TIE,adjust=yes, name=tiedsurf
ip_top_surf,se_bot_surf
************************************************************************
**			AMPLITUDE
************************************************************************
*Amplitude, name=amp_new
0.,0.,1.,1.,500.,1.
************************************************************************
****			INITIAL CONDITIONS
************************************************************************
************************************************************************
**			SIMULATION STEP
************************************************************************
*Step, Name=Swell, nlgeom=yes, inc=500000
*Static
0.001,500.,1.e-6,40.
*CONTROLS, PARAMETERS=LINE SEARCH
10,1.0,0.0001,0.25,0.10
*CONTROLS, PARAMETERS=TIME INCREMENTATION
,,,,,,,20,,,,,,
*** *CONTROLS, PARAMETERS=FIELD, FIELD=DISPLACEMENT
*** ,1.0,,,,,1.0,
**
**	DISPLACEMENT B.C.
**
**
*Boundary, op=new
se_left,1,1
Li_left,1,1
se_right,1,1
Li_right,1,1
sub_bottom,2,2
**
*Dsload, amplitude=amp_new
se_top_surf,P,0.1
**
**************************************************
*Output, field, frequency=20
*node output
u
*element output
S,E,SDV,SDEG
*contact output, nset=se_bottom
CSDMG
*End Step
************************************************************************
