*Heading
** Job name: Job-1 Model name: Model-1
** Generated by: Abaqus/CAE 2017
*Preprint, echo=NO, model=NO, history=NO, contact=NO
**
** PARTS
**
*Part, name=Lithium_SE
*Node
1, 500.000000000000, 15.000000000000
2, 0.000000000000, 15.000000000000
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*Element, type=CPE4H
1, 1, 15, 572, 278
2, 15, 16, 573, 572
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*Element, type=COH2D4
3025, 5, 300, 3197, 3177
3026, 300, 299, 3196, 3197
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*Element, type=COH2D4
3088, 9, 421, 3261, 3181
3089, 421, 420, 3260, 3261
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*Element, type=COH2D4
3151, 3176, 3187, 279, 5
3152, 3187, 3188, 280, 279
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*Nset, nset=Set-1
5, 6, 7, 8, 9, 10
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*Elset, elset=Set-1
1009, 1010, 1011, 1012, 1013, 1014
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*Nset, nset=Set-2
5, 6, 9, 10, 11, 12
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*Elset, elset=Set-2
1049, 1050, 1051, 1052, 1053, 1054
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*Nset, nset=Set-3
1, 2, 5, 8, 9, 11
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*Elset, elset=Set-3
1977, 1978, 1979, 1980, 1981, 1982
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*Nset, nset=Set-4
1, 2, 3, 4, 15, 16
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*Elset, elset=Set-4
1, 2, 3, 4, 5, 6
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** Section: Section-4
*Solid Section, elset=Set-4, material=Lithium_sub
1.,
** Section: Section-1
*Solid Section, elset=Set-1, material=SE1
1.,
** Section: Section-2
*Solid Section, elset=Set-2, material=SE2
1.,
** Section: Section-3
*Solid Section, elset=Set-3, material=Lithium_ip
1.,
*Elset, elset=CZMSet-1
3025, 3026, 3027, 3028, 3029, 3030
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*Elset, elset=CZMSet-2
3088, 3089, 3090, 3091, 3092, 3093
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*Elset, elset=CZMSet-3
3151, 3152, 3153, 3154, 3155, 3156
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*Cohesive Section, elset=CZMSet-1, material=CZMMaterial-1,controls = EC-1, response=TRACTION SEPARATION, thickness=SPECIFIED
1., 1.
*Cohesive Section, elset=CZMSet-2, material=CZMMaterial-2,controls = EC-1, response=TRACTION SEPARATION, thickness=SPECIFIED
1., 1.
*Cohesive Section, elset=CZMSet-3, material=CZMMaterial-3,controls = EC-1, response=TRACTION SEPARATION, thickness=SPECIFIED
1., 1.
*End Part
**
**
** ASSEMBLY
**
*Assembly, name=Assembly
**
*Instance, name=Lithium_SE-1, part=Lithium_SE
*End Instance
**
*Nset, nset=bottom, instance=Lithium_SE-1
3, 4, 147, 148, 149, 150
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*Elset, elset=bottom, instance=Lithium_SE-1
883, 884, 885, 886, 887, 888
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*Nset, nset=left, instance=Lithium_SE-1
2, 3, 7, 8, 140, 141
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*Elset, elset=left, instance=Lithium_SE-1
126, 252, 378, 504, 630, 756
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*Nset, nset=right, instance=Lithium_SE-1
1, 4, 13, 14, 272, 273
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*Elset, elset=right, instance=Lithium_SE-1
1, 127, 253, 379, 505, 631
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*Elset, elset=_top_surf_S2, internal, instance=Lithium_SE-1
1016, 1024, 1032, 1040, 1048, 1056
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*Elset, elset=_top_surf_S3, internal, instance=Lithium_SE-1
3020, 3021, 3022, 3023, 3024
*Surface, type=ELEMENT, name=top_surf
_top_surf_S2, S2
_top_surf_S3, S3
*End Assembly
**
** Element Controls
**
*Section Controls, name=EC-1, ELEMENT DELETION=YES, MAX DEGRADATION=1., hourglass=STIFFNESS, VISCOSITY=1.E-5
1., 1., 1.
** MATERIALS
**
*Material, name=Lithium_ip
*User material, Constants=16
**Eyoung poisson   Apre    Qact  To    mRate    Y0       Ho
  7.81e3,   0.38,  4.254E4, 37., 298., 0.15,   0.95E0,   10.E0
** Ysat   ahard nhard ,eBarLmt
  2.0E0,   2.0, 0.05, 13.e-6, 0.,1.,0.,1.036e2
*Depvar
24
10,nuP
12,Y
14,ebarp
15,conc
*Material, name=Lithium_sub
*User material, Constants=16
**Eyoung poisson   Apre    Qact  To    mRate    Y0       Ho
  7.81e3,   0.38,  4.254E4, 37., 298., 0.15,   0.95E0,   10.E0
** Ysat   ahard nhard ,eBarLmt
  2.0E0,   2.0, 0.05, 13.e-6, 0.,1.,0.,0.
*Depvar
24
10,nuP
12,Y
14,ebarp
15,conc
*Material, name=SE1
*Elastic
**200000., 0.25
150000., 0.25
*Material, name=SE2
*Elastic
**200000., 0.25
150000., 0.25
*Material, name=CZMMaterial-1
*Damage Initiation, criterion=QUADS
10.,10.,10.
*Damage Evolution, type=ENERGY
 1.,1.,1.
*Elastic, type=TRACTION
7.E5,7.E5,7.E5
**
*Material, name=CZMMaterial-2
*Damage Initiation, criterion=QUADS
10.,10.,10.
*Damage Evolution, type=ENERGY
 1.,1.,1.
*Elastic, type=TRACTION
7.E5,7.E5,7.E5
**
*Material, name=CZMMaterial-3
*Damage Initiation, criterion=QUADS
100.,100.,100.
*Damage Evolution, type=ENERGY
**10.,10.,10.
6.67,6.67,6.67
*Elastic, type=TRACTION
**2.E7,2.E7,2.E7
1.5E7,1.5E7,1.5E7
** ----------------------------------------------------------------
**
*Amplitude, name=amp_new
0.,0.,1.,1.,1000.,1.
*************************************************************
** STEP: Step-1
**
*Step, name=Step-1, nlgeom=YES, inc=10000
*Static, stabilize, factor=0.0002, allsdtol=0, continue=NO
0.1, 10000., 1e-05, 10.
*CONTROLS, PARAMETERS=TIME INCREMENTATION
,,,,,,,20,,,,,,
**
** BOUNDARY CONDITIONS
**
** Name: BC-1 Type: Displacement/Rotation
*Boundary
left, 1, 1
right, 1, 1
bottom,2,2
*Dsload,amplitude=amp_new
top_surf,P,0.1
** Name: BC-2 Type: Displacement/Rotation
**
** OUTPUT REQUESTS
**
*Restart, write, frequency=0
**
** FIELD OUTPUT: F-Output-1
**
*Output, field, frequency=5
*Node Output
RF, U
*Element Output, directions=YES
LE, S, SDEG, STATUS, SDV
**
** HISTORY OUTPUT: H-Output-1
**
*End Step
